# OpenSim document version 40500
Model GuineaFowl2019a:
  gravity: 0 -9.80665 0
  length_units: m
  force_units: N
  credits:
    Suzanne Cox Katrina Easton Melanie Cromie Lear Richard L. Marsh Scott L. Delp Jonas Rubenson
  publications:
    Cox, SM, Easton, KL, Cromie Lear, M, Marsh, RL, Delp, SL, Rubenson, J, The interaction of compliance and activation on the force-length operating range and force generating capacity of skeletal muscle: a computational study using a guinea fowl musculoskeletal model. Integrative Organismal Biology 2019 In press
  Ground
  BodySet:
    Body pelvis: mass=0.91495 [kg] mass_center=(0.03738 0.021283 0) inertia=(0.00485842 0 0.00485842 0 0 0)
        meshes=pelvis.vtp
    Body femur: mass=0.09625 mass_center=(-0.003445 -0.033086 0) inertia=(0.000112 0 0.000112 0 0 0) meshes=femur.vtp
    Body tibia: mass=0.07134 mass_center=(0.00016425 -0.0375585 0) inertia=(7.3936e-5 0 7.3936e-5 0 0 0)
        meshes=tibia.vtp
      WrapCylinder Ankle: xyz_body_rotation=(0.106814 0.0598648 1.12748) translation=(-0.0027 -0.115 0.0019)
          quadrant=-x radius=0.0055 length=0.02
      WrapCylinder EDL: active=false xyz_body_rotation=(0.0671952 0.0891863 0.744383)
          translation=(-0.0029 -0.1158 0.0045) quadrant=-x radius=0.0034 length=0.02
      WrapCylinder ANKLE_1: xyz_body_rotation=(0.00610865 0.0427606 1.04912) translation=(-0.0032 -0.1144 0.0028)
          quadrant=-x radius=0.005 length=0.01
      WrapCylinder Ankle7: xyz_body_rotation=(2.96305 0.0015708 -0.685042) translation=(-0.0003 -0.111 0.0032)
          quadrant=x radius=0.0045 length=0.0075
    Body patella: mass=0 mass_center=(0 0 0) inertia=(0 0 0 0 0 0) meshes=patella.vtp
    Body tmet: mass=0.01189 mass_center=(-0.002166 -0.034295 0) inertia=(8.53108e-6 0 8.53108e-6 0 0 0) meshes=tmet.vtp
      WrapCylinder TC_tib: xyz_body_rotation=(-0.06353 -0.0293215 -0.375769) translation=(0.0052 -0.0055 0.001)
          quadrant=x radius=0.001 length=0.01
    Body hallux: mass=0 mass_center=(0 0 0) inertia=(0 0 0 0 0 0) meshes=hallux.vtp
    Body Phal1_II: mass=0 mass_center=(0 0 0) inertia=(0 0 0 0 0 0) meshes=Phal1_II.vtp
    Body Phal2_II: mass=0 mass_center=(0 0 0) inertia=(0 0 0 0 0 0) meshes=Phal2_II.vtp
    Body Phal1_III: mass=0.007395 mass_center=(0.0160862 -0.0334367 0) inertia=(1.2848e-6 0 1.2848e-6 0 0 0)
        meshes=Phal1_III.vtp
      WrapCylinder EDL_III_1: xyz_body_rotation=(0.210487 -0.141023 1.92876) translation=(0.0044 0.0021 -0.0001)
          quadrant=x radius=0.001 length=0.002
      WrapCylinder TMP_1: xyz_body_rotation=(0.335278 0.0794125 1.3) translation=(-0.0003 0.001 0.0034) quadrant=-x
          radius=0.0075 length=0.014
    Body Phal2_III: mass=0.001595 mass_center=(0.0173165 -0.0293319 0) inertia=(2.22088e-7 0 2.22088e-7 0 0 0)
        meshes=Phal2_III.vtp
      WrapCylinder EDL_III: xyz_body_rotation=(0.182736 -0.143466 1.24529) translation=(0.003 0.0023 -0.0028)
          quadrant=x radius=0.002 length=0.01
    Body Phal1_IV: mass=0 mass_center=(0 0 0) inertia=(0 0 0 0 0 0) meshes=Phal1_IV.vtp
    Body Phal2_IV: mass=0 mass_center=(0 0 0) inertia=(0 0 0 0 0 0) meshes=Phal2_IV.vtp
    Body Phal3_IV: mass=0 mass_center=(0 0 0) inertia=(0 0 0 0 0 0) meshes=Phal3_IV.vtp
  JointSet:
    WeldJoint ground_to_pelvis: socket_parent_frame=ground_offset socket_child_frame=pelvis_offset
      PhysicalOffsetFrame ground_offset: socket_parent=/ground translation=(0 0.235496 0) [meters]
          orientation=(0 0 0.5235988) [radians]
      PhysicalOffsetFrame pelvis_offset: socket_parent=/bodyset/pelvis translation=(0 0 0)
    WeldJoint hip: socket_parent_frame=pelvis_offset socket_child_frame=femur_offset
      PhysicalOffsetFrame pelvis_offset: socket_parent=/bodyset/pelvis translation=(0.027 -0.0148 0.0225)
          orientation=(0.138466 0.18001 0.52026)
      PhysicalOffsetFrame femur_offset: socket_parent=/bodyset/femur translation=(0 0 0)
    WeldJoint knee: socket_parent_frame=femur_offset socket_child_frame=tibia_offset
      PhysicalOffsetFrame femur_offset: socket_parent=/bodyset/femur translation=(-0.003861 -0.074096 0.025)
          orientation=(-0.252471 -0.078221 -1.410792)
      PhysicalOffsetFrame tibia_offset: socket_parent=/bodyset/tibia translation=(0 0 0)
    WeldJoint tipat: socket_parent_frame=tibia_offset socket_child_frame=patella_offset
      PhysicalOffsetFrame tibia_offset: socket_parent=/bodyset/tibia
          translation=(0.0002657368 0.008731844 0.0002024189)
      PhysicalOffsetFrame patella_offset: socket_parent=/bodyset/patella translation=(0 0 0)
    CustomJoint ankle: socket_parent_frame=/bodyset/tibia socket_child_frame=/bodyset/tmet
      Coordinate ankle_flexion: default_value=2.094395 range=(0 2.530727) clamped=true
      SpatialTransform:
        TransformAxis rotation1: coordinates=ankle_flexion axis=(0 0 1) LinearFunction(coefficients=1 0)
        TransformAxis rotation2: axis=(1 0 0)
        TransformAxis rotation3: axis=(0 1 0)
        TransformAxis translation1: coordinates=ankle_flexion axis=(1 0 0)
          SimmSpline: x=(-3.05433 -2.61799 -2.0944 -1.58377 -0.959931 -0.523599 -0.174533)
              y=(-0.0097 -0.054955 -0.043485 -0.0026 0.0016 0 0)
        TransformAxis translation2: coordinates=ankle_flexion axis=(0 1 0)
          SimmSpline: x=(-3.05433 -2.61799 -2.0944 -1.58377 -0.959931 -0.523599 -0.174533)
              y=(-0.119 -0.08 -0.09 -0.119 -0.119 -0.119 -0.119)
        TransformAxis translation3: coordinates=ankle_flexion axis=(0 0 1)
            PiecewiseLinearFunction(x=-17453.3 17453.3, y=0.003 0.003)
    WeldJoint HAL: socket_parent_frame=tmet_offset socket_child_frame=hallux_offset
      PhysicalOffsetFrame tmet_offset: socket_parent=/bodyset/tmet translation=(-0.0065 -0.06 0.003)
          orientation=(0.3250146 -0.1518324 -1.863405)
      PhysicalOffsetFrame hallux_offset: socket_parent=/bodyset/hallux translation=(0 0 0)
    WeldJoint tmp_II: socket_parent_frame=Phal1_II_to_III_offset socket_child_frame=Phal1_II_offset
      PhysicalOffsetFrame Phal1_II_to_III_offset: socket_parent=/bodyset/Phal1_III
          translation=(-0.003708 -0.008016 -0.002403) orientation=(-0.21843 0.17909 0.0888)
      PhysicalOffsetFrame Phal1_II_offset: socket_parent=/bodyset/Phal1_II translation=(0 0 0)
    WeldJoint IP1_II: socket_parent_frame=Phal2_II_to_III_offset socket_child_frame=Phal2_II_offset
      PhysicalOffsetFrame Phal2_II_to_III_offset: socket_parent=/bodyset/Phal2_III
          translation=(-0.002268 -0.006951 -0.006417) orientation=(-0.308204 0.170516 0.104424)
      PhysicalOffsetFrame Phal2_II_offset: socket_parent=/bodyset/Phal2_II translation=(0 0 0)
    CustomJoint TMP: socket_parent_frame=tmet_offset socket_child_frame=/bodyset/Phal1_III
      Coordinate TMP_flexion: default_value=-1.850049 range=(-4.712389 1.570796) clamped=true
      PhysicalOffsetFrame tmet_offset: socket_parent=/bodyset/tmet translation=(0.0018 -0.074 0.006)
          orientation=(-0.09835713 -0.161371 0.01585302)
      SpatialTransform: axes_held_at_zero=(rotation2 rotation3 translation1 translation2 translation3)
        TransformAxis rotation1: coordinates=TMP_flexion axis=(0 0 1) LinearFunction(coefficients=1 0)
    WeldJoint IP1_III: socket_parent_frame=Phal1_III_offset socket_child_frame=Phal2_III_offset
      PhysicalOffsetFrame Phal1_III_offset: socket_parent=/bodyset/Phal1_III translation=(0.019 0 0.0003)
          orientation=(0 -5.561329e-11 0)
      PhysicalOffsetFrame Phal2_III_offset: socket_parent=/bodyset/Phal2_III translation=(0 0 0)
    WeldJoint tmp_IV: socket_parent_frame=Phal1_IV_to_III_offset socket_child_frame=Phal1_IV_offset
      PhysicalOffsetFrame Phal1_IV_to_III_offset: socket_parent=/bodyset/Phal1_III
          translation=(-0.000329 -0.004729 0.005465) orientation=(-0.1445 -0.084522 -0.026941)
      PhysicalOffsetFrame Phal1_IV_offset: socket_parent=/bodyset/Phal1_IV translation=(0 0 0)
    WeldJoint IP1_IV: socket_parent_frame=Phal2_IV_to_III_offset socket_child_frame=Phal2_IV_offset
      PhysicalOffsetFrame Phal2_IV_to_III_offset: socket_parent=/bodyset/Phal2_III
          translation=(-0.002893 -0.004516 0.005528) orientation=(-0.1445 -0.084522 -0.026941)
      PhysicalOffsetFrame Phal2_IV_offset: socket_parent=/bodyset/Phal2_IV translation=(0 0 0)
    WeldJoint IP2_IV: socket_parent_frame=Phal2_IV_to_III_offset socket_child_frame=Phal3_IV_offset
      PhysicalOffsetFrame Phal2_IV_to_III_offset: socket_parent=/bodyset/Phal2_III
          translation=(0.00516 -0.003573 0.006587) orientation=(-0.1445 -0.084522 -0.026941)
      PhysicalOffsetFrame Phal3_IV_offset: socket_parent=/bodyset/Phal3_IV translation=(0 0 0)
  ForceSet:
    DeGrooteFregly2016Muscle FL_p: min_control=0 max_control=1 max_isometric_force=44.869 optimal_fiber_length=0.04849
        tendon_slack_length=0.09945 pennation_angle_at_optimal=0.4405211 [radians]
      PathPoint P1: tibia (0.00709 -0.0076 0.01102)
      PathPoint P2: tibia (0.00214 -0.05319 0.00724)
      PathPoint P3: tibia (-0.00083 -0.0824 0.00758)
      PathPoint P4: tibia (-0.0039 -0.09982 0.00701)
      PathPoint P5: tibia (-0.00712 -0.10714 0.00365)
      PathPoint P6: tmet (-0.00626 -0.00252 -0.00055)
      PathWrap FL_p_pathwrap: wrap_object=Ankle
    DeGrooteFregly2016Muscle TC_t: min_control=0 max_control=1 max_isometric_force=24.5 optimal_fiber_length=0.05046
        tendon_slack_length=0.07443 pennation_angle_at_optimal=0.1624203
      PathPoint P1: tibia (0.01224 -0.00158 0.00171)
      PathPoint P2: tibia (0.0047 -0.04286 0.00396)
      PathPoint P3: tibia (0.0047 -0.05298 0.00423)
      PathPoint P4: tibia (0.00452 -0.06583 0.00418)
      PathPoint P5: tibia (0.00325 -0.08025 0.00367)
      PathPoint P6: tibia (0.0001 -0.1055 0.0024)
      ConditionalPathPoint P7: tmet (0.00549 -0.00736 0.00056) socket_coordinate=/jointset/ankle/ankle_flexion
          range=(1.0472 2.53073) [radians]
      PathPoint P8: tmet (0.00313 -0.01427 0.00135)
      PathWrap TC_t_pathwrap: wrap_object=TC_tib
      PathWrap TC_t_pathwrap_0: wrap_object=Ankle7
    DeGrooteFregly2016Muscle EDL_iii: min_control=0 max_control=1 max_isometric_force=17.35268
        optimal_fiber_length=0.01234 tendon_slack_length=0.1847 pennation_angle_at_optimal=0.5853453
      PathPoint P1: tibia (0.00394 -0.0373 0.0055)
      PathPoint P2: tibia (0.00437 -0.06711 0.0038)
      PathPoint P3: tibia (-0.0003 -0.106 0.0034)
      PathPoint P4: tibia (-0.001 -0.1079 0.0029)
      PathPoint P5: tibia (0.0008 -0.1102 0.0025)
      PathPoint P6: tmet (0.0062 -0.0009 -0.0002)
      PathPoint P7: tmet (0.0015 -0.0499 0.0042)
      PathPoint P8: tmet (0.00351 -0.07476 0.00595)
      PathPoint P9: Phal1_III (0.01707 0.00309 -0.00172)
      PathPoint P10: Phal2_III (0.01403 0.00374 -0.00325)
      PathPoint P11: Phal2_III (0.0269 0.00345 -0.0044)
      PathWrap EDL_iii_pathwrap: wrap_object=EDL
      PathWrap EDL_iii_pathwrap_0: wrap_object=EDL_III
      PathWrap EDL_iii_pathwrap_1: wrap_object=EDL_III_1
    DeGrooteFregly2016Muscle FDL_iii: min_control=0 max_control=1 max_isometric_force=35.57341
        optimal_fiber_length=0.0371 tendon_slack_length=0.222 pennation_angle_at_optimal=0.2234021
      PathPoint P1: tibia (-0.0021 -0.00611 0.01066)
      PathPoint P2: tibia (-0.0022 -0.10138 0.009)
      PathPoint P3: tibia (-0.007 -0.111 0.0051)
      PathPoint P4: tmet (-0.0078 -0.0035 0.0002)
      PathPoint P5: tmet (-0.0036 -0.0355 0.0037)
      PathPoint P6: tmet (-0.00803 -0.05908 0.00297)
      PathPoint P7: tmet (-0.00686 -0.06889 0.00746)
      PathPoint P8: Phal1_III (0.01705 -0.00324 -0.00241)
      PathPoint P9: Phal2_III (0.016 -0.0033 -0.00322)
      PathPoint P10: Phal2_III (0.02973 -0.0023 -0.00368)
      PathWrap FDL_iii_pathwrap: wrap_object=ANKLE_1 range=(3 4)
      PathWrap FDL_iii_pathwrap_0: wrap_object=TMP_1 range=(7 8)
    SmoothSphereHalfSpaceForce FootForce1: socket_sphere=/contactgeometryset/FootContact1
        socket_half_space=/contactgeometryset/GroundContact stiffness=2500 [N/m^2] dissipation=0.2 [s/m]
        static_friction=0.4 dynamic_friction=0.4 viscous_friction=0.1 transition_velocity=0.2 [m/s] hertz_smoothing=600
    SmoothSphereHalfSpaceForce FootForce2: socket_sphere=/contactgeometryset/FootContact2
        socket_half_space=/contactgeometryset/GroundContact stiffness=2500 dissipation=0.2 static_friction=0.4
        dynamic_friction=0.4 viscous_friction=0.1 transition_velocity=0.2 hertz_smoothing=600
    SmoothSphereHalfSpaceForce FootForce3: socket_sphere=/contactgeometryset/FootContact3
        socket_half_space=/contactgeometryset/GroundContact stiffness=2500 dissipation=0.2 static_friction=0.4
        dynamic_friction=0.4 viscous_friction=0.1 transition_velocity=0.2 hertz_smoothing=600
    SmoothSphereHalfSpaceForce FootForce4: socket_sphere=/contactgeometryset/FootContact4
        socket_half_space=/contactgeometryset/GroundContact stiffness=2500 dissipation=0.2 static_friction=0.4
        dynamic_friction=0.4 viscous_friction=0.1 transition_velocity=0.2 hertz_smoothing=600
  ContactGeometrySet:
    ContactHalfSpace GroundContact: socket_frame=/ground location=(0 0 0) orientation=(0 0 -1.570796)
    ContactSphere FootContact1: socket_frame=/bodyset/Phal1_III location=(0.003068 -0.002468 -7e-5) radius=0.01
    ContactSphere FootContact2: socket_frame=/bodyset/Phal1_III location=(0.016217 -0.001208 -0.001765)
        radius=0.009999999
    ContactSphere FootContact3: socket_frame=/bodyset/Phal2_III location=(0.01068484 -0.0007932541 -0.001694052)
        radius=0.01
    ContactSphere FootContact4: socket_frame=/bodyset/Phal2_III location=(0.02454707 0.001089773 -0.002547641)
        radius=0.01
