# OpenSim document version 40500
Model GuineaFowl2019a:
  gravity: 0 -9.80665 0
  length_units: m
  force_units: N
  credits:
    Suzanne Cox Katrina Easton Melanie Cromie Lear Richard L. Marsh Scott L. Delp Jonas Rubenson
  publications:
    Cox, SM, Easton, KL, Cromie Lear, M, Marsh, RL, Delp, SL, Rubenson, J, The interaction of compliance and activation on the force-length operating range and force generating capacity of skeletal muscle: a computational study using a guinea fowl musculoskeletal model. Integrative Organismal Biology 2019 In press
  Ground
  BodySet:
    Body tibia: mass=0.07134 [kg] mass_center=(0.00016425 -0.0375585 0) inertia=(7.3936e-5 0 7.3936e-5 0 0 0)
        meshes=tibia.vtp
      WrapCylinder Ankle: xyz_body_rotation=(0.106814 0.0598648 1.12748) translation=(-0.0027 -0.115 0.0019)
          quadrant=-x radius=0.0055 length=0.02
      WrapCylinder ANKLE_1: xyz_body_rotation=(0.00610865 0.0427606 1.04912) translation=(-0.0032 -0.1144 0.0028)
          quadrant=-x radius=0.005 length=0.01
      WrapCylinder ANKLE_2: xyz_body_rotation=(-0.128107 -0.0226893 0.962724) translation=(-0.001 -0.1164 0.0033)
          quadrant=-x radius=0.005 length=0.009
      WrapCylinder ANKLE_3: xyz_body_rotation=(2.96374 -0.0879646 -0.7) translation=(-0.0042 -0.116 0.0032) quadrant=-x
          radius=0.005 length=0.015
      WrapCylinder ANKLE_4: xyz_body_rotation=(-0.103673 0.166853 0.843518) translation=(-0.0047 -0.1198 0.0029)
          quadrant=-x radius=0.0035 length=0.002
      WrapCylinder Ankle_5: xyz_body_rotation=(0.0144862 0.0322886 1.1397) translation=(-0.0036 -0.1153 0.0021)
          quadrant=-x radius=0.0055 length=0.01
      WrapCylinder Ankle_6: xyz_body_rotation=(0.0329867 0.0230383 0.862018) translation=(-0.0031 -0.1165 0.0027)
          quadrant=-x radius=0.0055 length=0.02
      WrapCylinder Ankle7: xyz_body_rotation=(2.96305 0.0015708 -0.685042) translation=(-0.0003 -0.111 0.0032)
          quadrant=x radius=0.0045 length=0.0075
    Body tmet: mass=0.01189 mass_center=(-0.002166 -0.034295 0) inertia=(8.53108e-6 0 8.53108e-6 0 0 0) meshes=tmet.vtp
      WrapCylinder TC_Ankle: xyz_body_rotation=(-0.0612611 0.16441 -0.162839) translation=(0.0034 -0.0033 0.0017)
          quadrant=x radius=0.003 length=0.005
  JointSet:
    WeldJoint ground_to_tibia: socket_parent_frame=ground_offset socket_child_frame=tibia_offset
      PhysicalOffsetFrame ground_offset: socket_parent=/ground translation=(0 0.1000001 0) [meters]
          orientation=(0 0 -1.396263) [radians]
      PhysicalOffsetFrame tibia_offset: socket_parent=/bodyset/tibia translation=(0 0 0)
    CustomJoint ankle: socket_parent_frame=/bodyset/tibia socket_child_frame=/bodyset/tmet
      Coordinate ankle_flexion: default_value=2.094395 range=(0 3.1) clamped=false
      SpatialTransform:
        TransformAxis rotation1: coordinates=ankle_flexion axis=(0 0 1) LinearFunction(coefficients=1 0)
        TransformAxis rotation2: axis=(1 0 0)
        TransformAxis rotation3: axis=(0 1 0)
        TransformAxis translation1: coordinates=ankle_flexion axis=(1 0 0)
          SimmSpline: x=(-3.05433 -2.61799 -2.0944 -1.58377 -0.959931 -0.523599 -0.174533)
              y=(-0.0097 -0.054955 -0.043485 -0.0026 0.0016 0 0)
        TransformAxis translation2: coordinates=ankle_flexion axis=(0 1 0)
          SimmSpline: x=(-3.05433 -2.61799 -2.0944 -1.58377 -0.959931 -0.523599 -0.174533)
              y=(-0.119 -0.08 -0.09 -0.119 -0.119 -0.119 -0.119)
        TransformAxis translation3: coordinates=ankle_flexion axis=(0 0 1)
            PiecewiseLinearFunction(x=-17453.3 17453.3, y=0.003 0.003)
  ForceSet:
    DeGrooteFregly2016Muscle FL_p_test: min_control=0 max_control=1 max_isometric_force=44.869
        optimal_fiber_length=0.04849 tendon_slack_length=0.09945 pennation_angle_at_optimal=0.4405211 [radians]
      PathPoint FL_p-P1: tibia (0.00709 -0.0076 0.01102)
      PathPoint FL_p-P2: tibia (0.00214 -0.05319 0.00724)
      PathPoint FL_p-P3: tibia (-0.00083 -0.0824 0.00758)
      PathPoint FL_p-P4: tibia (-0.0039 -0.09982 0.00701)
      PathPoint FL_p-P5: tibia (-0.00712 -0.10714 0.00365)
      PathPoint FL_p-P6: tmet (-0.00626 -0.00252 -0.00055)
    DeGrooteFregly2016Muscle TC_t_test: min_control=0 max_control=1 max_isometric_force=24.5
        optimal_fiber_length=0.05046 tendon_slack_length=0.07443 pennation_angle_at_optimal=0.1624203
      PathPoint TC_t-P1: tibia (0.01224 -0.00158 0.00171)
      PathPoint TC_t-P2: tibia (0.0047 -0.04286 0.00396)
      PathPoint TC_t-P3: tibia (0.0047 -0.05298 0.00423)
      PathPoint TC_t-P4: tibia (0.00452 -0.06583 0.00418)
      PathPoint TC_t-P5: tibia (0.00325 -0.08025 0.00367)
      PathPoint TC_t-P6: tibia (0.0001 -0.1055 0.0024)
      ConditionalPathPoint TC_t-P7: tmet (0.00549 -0.00736 0.00056) socket_coordinate=/jointset/ankle/ankle_flexion
          range=(1.0472 2.53073) [radians]
      PathPoint TC_t-P8: tmet (0.00313 -0.01427 0.00135)
    SmoothSphereHalfSpaceForce FootForce1: socket_sphere=/contactgeometryset/FootContact1
        socket_half_space=/contactgeometryset/GroundContact stiffness=25000 [N/m^2] dissipation=0.2 [s/m]
        static_friction=0.4 dynamic_friction=0.4 viscous_friction=0.1 transition_velocity=0.2 [m/s] hertz_smoothing=600
    SmoothSphereHalfSpaceForce FootForce2: socket_sphere=/contactgeometryset/FootContact2
        socket_half_space=/contactgeometryset/GroundContact stiffness=25000 dissipation=0.2 static_friction=0.4
        dynamic_friction=0.4 viscous_friction=0.1 transition_velocity=0.2 hertz_smoothing=600
    SmoothSphereHalfSpaceForce FootForce3: socket_sphere=/contactgeometryset/FootContact3
        socket_half_space=/contactgeometryset/GroundContact stiffness=25000 dissipation=0.2 static_friction=0.4
        dynamic_friction=0.4 viscous_friction=0.1 transition_velocity=0.2 hertz_smoothing=600
    SmoothSphereHalfSpaceForce FootForce4: socket_sphere=/contactgeometryset/FootContact4
        socket_half_space=/contactgeometryset/GroundContact stiffness=25000 dissipation=0.2 static_friction=0.4
        dynamic_friction=0.4 viscous_friction=0.1 transition_velocity=0.2 hertz_smoothing=600
  ContactGeometrySet:
    ContactHalfSpace GroundContact: socket_frame=/ground location=(0 0 0) orientation=(0 0 -1.570796)
    ContactSphere FootContact1: socket_frame=/bodyset/tmet location=(0.00312986 -0.065 0.003) radius=0.015
    ContactSphere FootContact2: socket_frame=/bodyset/tmet location=(-0.00612986 -0.065 0.003) radius=0.015
    ContactSphere FootContact3: socket_frame=/bodyset/tmet location=(0.00212986 -0.065 0.0095) radius=0.015
    ContactSphere FootContact4: socket_frame=/bodyset/tmet location=(-0.00612986 -0.065 0.009) radius=0.015
